// COMSOL Multiphysics 5.5.0.292 model "classB_laser_wahw.mph"
// Outline of the model tree

Parameters
  wvl = 10[um]
  k = 2*pi/wvl
  fre = c_const/wvl
  w = 2*pi*fre
  neff = 3.1
  pulsewidth = l/20
  delay = 10*pulsewidth
  l = 10000[um]
  vel = c_const/neff
  x0 = l
  Reflectivity = 0.1  // mirror loss
  lifetime = 1[ns]
  loss = 1/lifetime
  mirr_loss = 0.4
  fc = 0
  R = threshold*10  // pump rate
  tr = 4[ns]
  sigma = 24/lifetime
  threshold = (loss/sigma+1)/tr
  gain = sigma*(R*tr-1)
  noise = 5e-2

Functions
  gp1: GaussianPulse | location = pulsewidth*4; sigma = pulsewidth
  rn1: Random | nargs = 2; uniformrange = noise; seed = 113013

Variables
  var1 "Variables 1" on domains 1, 2
    lo = 0
    speed = c_const/neff
    Rsplit = R
  var2 "Variables 2" on domains 3, 4
    lo = 1/lifetime
    speed = c_const
    Rsplit = 0
  var3 "Variables 3"

Probes
  dom1: Domain "Maximum E Field" on all domains
    type = maximum
    probename = Max_E
    expr = abs(Ep+Em)
    unit = 1
    table = tbl1
  dom2: Domain "Average E Field" on all domains | expr = abs(Ep+Em); unit = 1; table = tbl1

Geometry
  geom1 "Geometry 1" (1D, length unit m)
    i1: Interval | coord = {0, l}
    i2: Interval | coord = {l, 2*l}
    pt1: Point | p = l*1.95
    pt2: Point | p = l*0.05
    fin: Finalize "Form Union"

Materials
  mat1: Common "Material 1" on all domains
    pg1 "User-defined property group"
      lo = 0
  mat2: Common "Material 2" on domains 3, 4
    pg1 "User-defined property group"
      lo = loss

Physics
  wahw: WaveFormPDE on all domains
    dependent variable u = {Ep, Em, N}
    ShapeProperty.order = 4
    Units.DependentVariableQuantity = none
    Units.CustomDependentVariableUnit = 1
    Units.CustomSourceTermUnit = 1/m
    wafeq1: WaveFormPDE (default)
      Ga = {Ep, Em, 0}
      f = {0.5*(-loss*Ep+sigma*(N-1))/vel +rn1(x,t), -0.5*(-loss*Em+sigma*(N-1))/vel +rn1(x,t), (Rsplit-N/tr-(2/tr)*(N-1)*abs(Ep+Em)^2)/1[m/s]}
      tau = {0, 0, 0}
      da = diag{1/vel, -1/vel, 1[s/m]}
      filteractive = 1
      filter = {36, 0.5, 3}
      ws = vel
    zflx1: ZeroFluxBoundary "Zero Flux 1" (default)
    init1: init "Pulse Initial Condition" (default) | Ep = exp(-((x-x0)/pulsewidth)^2); N = R*tr
    init2: init "Noise Initial Condition" on all domains | Ep = rn1(x,0); Em = rn1(x,0); N = R*tr
    flux1: FluxBoundary "RightMirror" on boundaries 5 | q = {1, 1+mirr_loss, 0, 1+mirr_loss, 1, 0, 0, 0, 0}
    flux2: FluxBoundary "LeftMirror" on boundaries 1 | q = {-1, -1-mirr_loss, 0, -1-mirr_loss, -1, 0, 0, 0, 0}
  ge: GlobalEquations "Carrier density" (disabled)
    ge1: GlobalEquations
      name = Nn
      equation = R-Nn/tr-(2/tr)*(Nn-1)*abs(u+u2)^2
      valueType = complex
      DependentVariableQuantity = dimensionless
      CustomDependentVariableUnit = m
      SourceTermQuantity = none
      CustomSourceTermUnit = 1/s

Mesh
  mesh1 "Mesh 1"
    size: MeshSizeDefault | hmax = l/30; hauto = 3; custom = on
    edg1: Edge on remaining entities
    ref1: Refine (disabled) on domains 1, 4 | numrefine = 2

Studies
  std1 "Study 1"
    time: Transient "Time Dependent" | tunit = ns; tlist = range(0,20/99,20); usertol = on; rtol = 3e-6

Solver configurations
  sol1 "Solution 1" (study std1)
    v1: Variables "Dependent Variables 1"
    tx1: TimeExplicit "Time-Explicit Solver 1"
      tunit = ns
      tlist = range(0,20/99,20)
      tstepping = elemexprs
      exprs = root.comp1.wahw.wtc
      rtol = 3e-6
      dDef: Direct

Datasets
  dset1: Solution | solution = sol1
  cpt1: CutPoint2D
  dset2: Solution "Probe Solution 2" | solution = sol1
  max1: Maximum "Maximum E Field" on domains 1-4 | data = dset2
  avh1: Average "Average E Field" on domains 1-4 | data = dset2

Derived values
  gev1: EvalGlobal "Global Evaluation 1"
    data = dset2
    table = tbl2
    expr = comp1.Max_E
    unit = 1
    descr = Probe variable Max_E
  pev1: EvalPoint "Point Evaluation 1" on boundaries 5
    data = dset1
    expr = dflux.E1
    descr = Boundary flux down direction
  pev2: EvalPoint "Maximum E Field" | data = max1; table = tbl1; expr = abs(Ep+Em)
  pev3: EvalPoint "Average E Field" | data = avh1; table = tbl1; expr = abs(Ep+Em)

Plots
  pg2: PlotGroup1D "1D Plot Group 2" | data = dset1; yseclabel = N-1 (1)
    lngr1: LineGraph on all domains | expr = abs(Ep+Em); xdata = expr; xdataexpr = x
    lngr2: LineGraph on all domains | expr = N-1; xdata = expr; xdataexpr = x
  pg3: PlotGroup1D "Probe Plot Group 3"
    tblp1: Table "Probe Table Graph 1" | table = tbl1
  pg4: PlotGroup1D "1D Plot Group 4" | data = none
    tblp1: Table "Table Graph 1" | table = tbl2