// COMSOL Multiphysics 5.5.0.292 model "Lid_Driven_Cavity_round.mph"
// Outline of the model tree

Parameters
  Re = 100
  DrivingAmp = 5[m/s]
  world_radius = 5[m]
  particle_radius = 0.2[m]
  mass = 0.1[kg]
  RI = 0.1[kg*m^2]  // Moment of inertia

Functions
  int2: Interpolation "Turbulence data" | importedname = turbulencedata.txt; source = file; filename = /home/sinan/Documents/turbulence/turbulencedata.txt; struct = grid; extrap = linear; argunit = 1; fununit = 1

Variables
  var1 "Variables 1"
    theta = atan2(y,x)

Couplings
  intop1: Integration on boundaries 3, 4, 6, 7

Probes
  var1: GlobalVariable "Global Variable Probe 1" | expr = Vx; unit = m/s; descr = State variable Vx; table = tbl1
  var2: GlobalVariable "Global Variable Probe 2" | expr = Vy; unit = m/s; descr = State variable Vy; table = tbl1
  var3: GlobalVariable "Global Variable Probe 3" | expr = w; unit = rad/s; descr = angular velocity; table = tbl1
  bnd1: Boundary "Boundary Probe 1" on all boundaries
    expr = cos(theta)*u2+sin(theta)*v2
    unit = m/s
    frame = spatial
    table = tbl1

Geometry
  geom1 "Geometry 1" (2D, length unit m)
    c3: Circle | r = world_radius
    c2: Circle | r = particle_radius
    dif1: Difference | input = c3; input2 = c2
    fin: Finalize "Form Union"

Materials
  mat1: Common "Water" on all domains
    def "Basic"
      thermalexpansioncoefficient = alpha_p(T)
      bulkviscosity = muB(T)
      dynamicviscosity = eta(T)
      ratioofspecificheat = gamma_w(T)
      electricconductivity = 5.5e-6[S/m]
      heatcapacity = Cp(T)
      density = rho(T)
      thermalconductivity = k(T)
      soundspeed = cs(T)
      eta: Piecewise
        arg = T
        pieces = 
          {273.15, 413.15, 1.3799566804-0.021224019151*T^1+1.3604562827E-4*T^2-4.6454090319E-7*T^3+8.9042735735E-10*T^4-9.0790692686E-13*T^5+3.8457331488E-16*T^6}
          {413.15, 553.75, 0.00401235783-2.10746715E-5*T^1+3.85772275E-8*T^2-2.39730284E-11*T^3}
        argunit = K
        fununit = Pa*s
      Cp: Piecewise | arg = T; pieces = {273.15, 553.75, 12010.1471-80.4072879*T^1+0.309866854*T^2-5.38186884E-4*T^3+3.62536437E-7*T^4}; argunit = K; fununit = J/(kg*K)
      rho: Piecewise
        arg = T
        smooth = contd1
        pieces = 
          {273.15, 293.15, 6.3092789034e-05*T^3-0.0603676398829*T^2+18.9229382407066*T-950.704055329848}
          {293.15, 373.15, 1.0335053319e-05*T^3-0.0133950656345*T^2+4.96928883266*T+432.257114008512}
        argunit = K
        fununit = kg/m^3
      k: Piecewise | arg = T; pieces = {273.15, 553.75, -0.869083936+0.00894880345*T^1-1.58366345E-5*T^2+7.97543259E-9*T^3}; argunit = K; fununit = W/(m*K)
      cs: Interpolation | table = {{273, 1403}, {278, 1427}, {283, 1447}, {293, 1481}, {303, 1507}, {313, 1526}, {323, 1541}, {333, 1552}, {343, 1555}, {353, 1555}, {363, 1550}, {373, 1543}}; interp = piecewisecubic; argunit = K; fununit = m/s
      an1: Analytic | funcname = alpha_p; expr = -1/rho(T)*d(rho(T),T); args = T; argunit = K; fununit = 1/K
      an2: Analytic | funcname = gamma_w; expr = 1+(T/Cp(T))*(alpha_p(T)*cs(T))^2; args = T; argunit = K; fununit = 1
      an3: Analytic | funcname = muB; expr = 2.79*eta(T); args = T; argunit = K; fununit = Pa*s
  mat2: Common "Material 2" (disabled) on no domains
    def "Basic"
      density = 1
      dynamicviscosity = 1/Re
  mat3: Common "Air" on domains 1
    def "Basic"
      thermalexpansioncoefficient = alpha_p(pA,T)
      molarmass = 0.02897
      bulkviscosity = muB(T)
      dynamicviscosity = eta(T)
      ratioofspecificheat = 1.4
      electricconductivity = 0[S/m]
      heatcapacity = Cp(T)
      density = rho(pA,T)
      thermalconductivity = k(T)
      soundspeed = cs(T)
      eta: Piecewise | arg = T; pieces = {200.0, 1600.0, -8.38278E-7+8.35717342E-8*T^1-7.69429583E-11*T^2+4.6437266E-14*T^3-1.06585607E-17*T^4}; argunit = K; fununit = Pa*s
      Cp: Piecewise | arg = T; pieces = {200.0, 1600.0, 1047.63657-0.372589265*T^1+9.45304214E-4*T^2-6.02409443E-7*T^3+1.2858961E-10*T^4}; argunit = K; fununit = J/(kg*K)
      rho: Analytic | expr = pA*0.02897/R_const[K*mol/J]/T; args = {pA, T}; dermethod = manual; argders = {{pA, d(pA*0.02897/R_const/T,pA)}, {T, d(pA*0.02897/R_const/T,T)}}; argunit = Pa,K; fununit = kg/m^3
      k: Piecewise | arg = T; pieces = {200.0, 1600.0, -0.00227583562+1.15480022E-4*T^1-7.90252856E-8*T^2+4.11702505E-11*T^3-7.43864331E-15*T^4}; argunit = K; fununit = W/(m*K)
      cs: Analytic | expr = sqrt(1.4*R_const[K*mol/J]/0.02897*T); args = T; dermethod = manual; argunit = K; fununit = m/s
      an1: Analytic | funcname = alpha_p; expr = -1/rho(pA,T)*d(rho(pA,T),T); args = {pA, T}; argunit = Pa, K; fununit = 1/K
      an2: Analytic "Analytic 2a" | funcname = muB; expr = 0.6*eta(T); args = T; argunit = K; fununit = Pa*s
    NonlinearModel
      BA = (def.gamma+1)/2

Physics
  spf2: TurbulentFlowlowRekeps "Turbulent Flow, Spalart-Allmaras 2" on domains 1
    dependent variable u2 = {u2, v2, w2}
    dependent variable p2
    dependent variable k2
    dependent variable ep2
    dependent variable om2
    dependent variable G2
    dependent variable uc2 = {uc2x, uc2y, uc2z}
    dependent variable pc2
    dependent variable nutilde2
    dependent variable yPlus2
    dependent variable uPlus2
    dependent variable zeta2
    dependent variable alpha2
    TurbulenceModelProperty.TurbulenceModel = SpalartAllmaras
    AdvancedSettingProperty.locCFL = spf2.localCFLvalue
    fp1: FluidProperties (default)
    init1: init "Initial Values 1" (default)
      nutilde_init = spf2.nutildeinit
      G_init = spf2.G0
      k_init = spf2.kinit
      ep_init = spf2.epinit
      om_init = spf2.omInit
      yPlus_init = spf2.yPlusinit
      uPlus_init = spf2.uPlusinit
    wallbc1: WallBC "Wall 1" (default) | TranslationalVelocityOption = ZeroFixedWall
    prpc1: PressurePointConstraint on points 6 | constraintMethod = nodal
    wallbc3: WallBC "Body" on boundaries 3, 4, 6, 7 | utr = {w, 0, 0}; TranslationalVelocityOption = Manual
    wallbc4: WallBC "DrivingWall 1" on boundaries 1, 2, 5, 8
      utr = {-Vx+cos(theta)*int2(theta,t)*DrivingAmp, -Vy+sin(theta)*int2(theta,t)*DrivingAmp, 0}
      uvw = int2(theta,t+20)*DrivingAmp
      SlidingWall = 1
      TranslationalVelocityOption = Manual
      ApplyWallRoughness = 1
      kseq = 1[cm]
  ge: GlobalEquations "Global ODEs and DAEs"
    ge1: GlobalEquations "Velocity"
      name = {Vx, Vy}
      equation = {mass*Vxt+intop1( p2*particle_radius*cos(theta)), mass*Vyt+intop1(p2* particle_radius*sin(theta))}
      initialValueU = {0, 0}
      initialValueUt = {0, 0}
      description = {, }
      valueType = complex
      DependentVariableQuantity = none
      CustomDependentVariableUnit = m/s
      SourceTermQuantity = none
      CustomSourceTermUnit = N
    ge2: GlobalEquations "Rotation"
      name = w
      equation = RI*wt+intop1(p2* particle_radius*cos(theta)*y)+intop1(p2* particle_radius*sin(theta)*x)
      valueType = complex
      DependentVariableQuantity = none
      CustomDependentVariableUnit = rad/s
      SourceTermQuantity = none
      CustomSourceTermUnit = N*m

Mesh
  mesh1 "Mesh 1"
    size: MeshSizeDefault | table = cfd; hauto = 3
    dis1: Distribution on boundaries 3, 4, 6, 7 | numelem = 3
    map1: Map "Mapped 1" (disabled) on remaining entities
      dis1: Distribution on no boundaries
        type = predefined
        elemcount = 50
        elemratio = 5
        method = geometric
        symmetric = on
    ftri1: FreeTri "Free Triangular 1" on remaining entities

Studies
  std1 "Study 1"
    time: Transient "Time Dependent" | tlist = range(0,1,50); solve for = {spf2, ge}

Solver configurations
  sol1 "Solution 1" (study std1)
    v1: Variables "Dependent Variables 1"
    t1: Time "Time-Dependent Solver 1"
      tlist = range(0,1,50)
      rtol = 0.04
      atolglobalfactor = 0.05
      atolmethod = {comp1_G2, global, comp1_nutilde2, unscaled, comp1_p2, scaled, comp1_u2, global, comp1_ODE1, global, comp1_ODE2, global}
      atolvaluemethod = {comp1_G2, factor, comp1_nutilde2, manual, comp1_p2, factor, comp1_u2, factor, comp1_ODE1, factor, comp1_ODE2, factor}
      atolfactor = {comp1_G2, 0.1, comp1_nutilde2, 0.1, comp1_p2, 1, comp1_u2, 0.1, comp1_ODE1, 0.1, comp1_ODE2, 0.1}
      atol = {comp1_G2, 1e-3, comp1_nutilde2, 5.0E-6, comp1_p2, 1e-3, comp1_u2, 1e-3, comp1_ODE1, 1e-3, comp1_ODE2, 1e-3}
      maxorder = 2
      stabcntrl = on
      bwinitstepfrac = 0.01
      estrat = exclude
      se1: Segregated | ntolfact = 0.5; segstabacc = segaacc; segaaccdim = 5
        ss1: SegregatedStep "Merged variables"
          segvar = {comp1_ODE1, comp1_ODE2, comp1_u2, comp1_p2}
          linsolver = d1
          subdamp = 0.8
          subjtech = once
        ss2: SegregatedStep "Turbulence variables"
          segvar = {comp1_nutilde2}
          linsolver = d2
          subdamp = 0.8
          subjtech = onevery
        ll1: LowerLimit | lowerlimit = comp1.nutilde2 0
      d1: Direct
      d2: Direct "Direct, turbulence variables (spf2)" | linsolver = pardiso; pivotperturb = 1.0E-13

Datasets
  dset1: Solution | solution = sol1

Tables
  tbl1: Table "Probe Table 1"
    Time (s) | State variable Vx (m/s) | State variable Vy (m/s) | State variable w (rad/s) | cos(theta)*u2+sin(theta)*v2 (m/s), Boundary Probe 1
    0 | 0.370072 | 0.139194 | -0.00197752 | -0.0262611
    1.89305e-05 | 0.371301 | 0.13976 | -0.00196632 | -0.0252312
    5.67916e-05 | 0.373617 | 0.140805 | -0.00194655 | -0.0232397
    6.63085e-05 | 0.390893 | 0.147649 | -0.0020751 | -0.00907841
    7.14129e-05 | 0.443968 | 0.168235 | -0.00300854 | -0.00150848
    7.54023e-05 | 0.466152 | 0.177257 | -0.00357498 | -0.000237812
    7.89928e-05 | 0.472141 | 0.179815 | -0.00380738 | 0.00119988
    8.22243e-05 | 0.475168 | 0.181016 | -0.00393223 | 0.00115835
    8.86872e-05 | 0.478522 | 0.182325 | -0.00407913 | 0.0016783
    9.51501e-05 | 0.480815 | 0.1832 | -0.0041668 | 0.00236747
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
Plots
  pg3: PlotGroup1D "Probe Plot Group 3"
    tblp1: Table "Probe Table Graph 1" | table = tbl1
  pg9: PlotGroup1D "Probe Plot Group 9"
    tblp1: Table "Probe Table Graph 1" | table = tbl1