// COMSOL Multiphysics 5.5.0.292 model "QCL_2D.mph"
// QCL
// Outline of the model tree

Parameters
  w_top = 8[um]
  w_bottom = 16[um]
  d_clad = 2.5[um]
  eps_au = -3200 -1280*i
  eps_dummy = -3
  w_sim = 100[um]
  h_sim = 50[um]
  t_ins = 500[nm]
  wvl = 9.5[um]
  cutangle = 0*pi/360
  r_edge = 1[um]
  d_metal = 4[um]
  d_ingas1 = 0.2[um]
  d_inp2 = 2.500[um]
  d_inp3 = 0.85[um]
  d_ingas4 = 0.1[um]
  d_active = 2.764[um]
  d_ingas_1 = 0.2[um]
  d_inp_2 = 2[um]
  d_ingas_3 = 0.5[um]
  n_ingas1 = 3.41
  n_inp2 = 3.0531
  n_inp3 = 2.99
  n_ingas4 = 2.5
  n_active = 3.34
  n_ingas_1 = 3.41
  n_inp_2 = 3.06
  n_ingas_3 = 2.95
  n_subs = 3.03
  d_etch = d_active+d_ingas1+d_inp2+d_inp3+d_ingas4
  d_etch0 = 6[um]

Variables
  var3 "Variables 3" on all domains
    d = 1
  var4 "Variables 4"

Couplings
  intop1: Integration on all domains | frame = mesh

Geometry
  geom1 "Geometry 1" (2D, length unit µm)
    r1: Rectangle "substrate" | pos = {0, -h_sim}; size = {w_sim, h_sim}
    r3: Rectangle "Air" | size = {w_sim, h_sim}
    b6: BezierPolygon "CutMesa"
      p = 
        {w_sim/2+w_top/2, w_sim/2+w_top/2, w_sim/2-w_top/2, w_sim/2-w_top/2, 0, 0, w_sim, w_sim, w_sim}
        {0, d_etch-w_top*sin(cutangle), d_etch, 0, 0, h_sim, h_sim, 0, 0}
      degree = {1, 1, 1, 1, 1, 1, 1, 1}
      w = {1, 1, 1, 1, 1, 1, 1, 1, 1, 1, 1, 1, 1, 1, 1, 1}
    fil4: Fillet | point = b6(1) points 3, 5; radius = r_edge
    dif3: Difference | input = r3; input2 = fil4
    b7: BezierPolygon "Active region cut" | p = {{0, w_sim}, {d_active, d_active}}; degree = 1; w = {1, 1}; type = open
    b12: BezierPolygon "Ingas1" | p = {{0, w_sim}, {d_active+d_ingas1, d_active+d_ingas1}}; degree = 1; w = {1, 1}
    b14: BezierPolygon "Inp2"
      p = {{0, w_sim}, {d_active+d_ingas1+d_inp2, d_active+d_ingas1+d_inp2}}
      degree = 1
      w = {1, 1}
    b15: BezierPolygon "Inp3"
      p = {{0, w_sim}, {d_active+d_ingas1+d_inp2+d_inp3, d_active+d_ingas1+d_inp2+d_inp3}}
      degree = 1
      w = {1, 1}
    b16: BezierPolygon "Ingas4"
      p = 
        {0, w_sim}
        {d_active+d_ingas1+d_inp2+d_inp3+d_ingas4, d_active+d_ingas1+d_inp2+d_inp3+d_ingas4}
      degree = 1
      w = {1, 1}
    b17: BezierPolygon "Ingas_1" | p = {{0, w_sim}, {-d_ingas_1, -d_ingas_1}}; degree = 1; w = {1, 1}
    b18: BezierPolygon "Inp_2" | p = {{0, w_sim}, {-d_ingas_1-d_inp_2, -d_ingas_1-d_inp_2}}; degree = 1; w = {1, 1}
    b19: BezierPolygon "InGas_3"
      p = {{0, w_sim}, {-d_ingas_1-d_inp_2-d_ingas_3, -d_ingas_1-d_inp_2-d_ingas_3}}
      degree = 1
      w = {1, 1}
    b13: BezierPolygon "Ingas cut 1.1" (disabled) | p = {{0, w_sim}, {-d_ingas, -d_ingas}}; degree = 1; w = {1, 1}
    b8: BezierPolygon "Cladding cut" (disabled)
      p = {{0, w_sim}, {d_active+d_clad, d_active+d_clad}}
      degree = 1
      w = {1, 1}
    b9: BezierPolygon "Cladding bottom cut" (disabled)
      p = {{w_sim, 0}, {-d_clad-d_ingas, -d_clad-d_ingas}}
      degree = 1
      w = {1, 1}
    par1: Partition "Partition Objects 1" | input = dif3, r1; tool = b12, b14, b15, b16, b17, b18, b19, b7
    b10: BezierPolygon "Insulator"
      p = 
        {w_sim, w_sim, w_sim/2+w_top/2+t_ins, w_sim/2+w_top/2+t_ins, w_sim/2-w_top/2-t_ins, w_sim/2-w_top/2-t_ins, 0, 0}
        {0, t_ins, t_ins, d_etch-w_top*sin(cutangle)+t_ins, d_etch+t_ins, t_ins, t_ins, 0}
      degree = {1, 1, 1, 1, 1, 1, 1}
      w = {1, 1, 1, 1, 1, 1, 1, 1, 1, 1, 1, 1, 1, 1}
    fil5: Fillet "Insulator fillet" (disabled) | point = b10(1) points 3, 5; radius = r_edge-t_ins
    r4: Rectangle "Air 1" | size = {w_sim, h_sim/2}
    pt1: Point "Metal" | p = {w_sim/2-w_top/2+d_metal, d_etch}
    b11: BezierPolygon "Bézier Polygon 11"
      p = {{w_sim/2-w_top/2+d_metal, w_sim/2-w_top/2+d_metal}, {d_etch, d_etch+t_ins}}
      degree = 1
      w = {1, 1}
    b20: BezierPolygon "Bézier Polygon 20"
      p = {{w_sim/2-w_top/2, w_sim/2-w_top/2}, {d_etch, d_etch+t_ins}}
      degree = 1
      w = {1, 1}
    fin: Finalize "Form Union"

Materials
  mat3: Common "Air" on domains 1, 6
    def "Basic"
      relpermeability = 1
      relpermittivity = 1
      dynamicviscosity = eta(T[1/K])[Pa*s]
      ratioofspecificheat = 1.4
      electricconductivity = 0[S/m]
      heatcapacity = Cp(T[1/K])[J/(kg*K)]
      density = rho(pA[1/Pa],T[1/K])[kg/m^3]
      thermalconductivity = k(T[1/K])[W/(m*K)]
      soundspeed = cs(T[1/K])[m/s]
      eta: Piecewise | arg = T; pieces = {200.0, 1600.0, -8.38278E-7+8.35717342E-8*T^1-7.69429583E-11*T^2+4.6437266E-14*T^3-1.06585607E-17*T^4}
      Cp: Piecewise | arg = T; pieces = {200.0, 1600.0, 1047.63657-0.372589265*T^1+9.45304214E-4*T^2-6.02409443E-7*T^3+1.2858961E-10*T^4}
      rho: Analytic | expr = pA*0.02897/8.314/T; args = {pA, T}; dermethod = manual; argders = {{pA, d(pA*0.02897/8.314/T,pA)}, {T, d(pA*0.02897/8.314/T,T)}}
      k: Piecewise | arg = T; pieces = {200.0, 1600.0, -0.00227583562+1.15480022E-4*T^1-7.90252856E-8*T^2+4.11702505E-11*T^3-7.43864331E-15*T^4}
      cs: Analytic | expr = sqrt(1.4*287*T); args = T; dermethod = manual; argders = {T, d(sqrt(1.4*287*T),T)}
    RefractiveIndex
      n = 1
      ki = 0
  mat4: Common "Copper" on no domains
    def "Basic"
      relpermeability = 1
      electricconductivity = 5.998e7[S/m]
      thermalexpansioncoefficient = 17e-6[1/K]
      heatcapacity = 385[J/(kg*K)]
      relpermittivity = 1
      density = 8700[kg/m^3]
      thermalconductivity = 400[W/(m*K)]
    Enu "Young's modulus and Poisson's ratio"
      youngsmodulus = 110e9[Pa]
      poissonsratio = 0.35
    linzRes "Linearized resistivity"
      rho0 = 1.72e-8[ohm*m]
      alpha = 0.0039[1/K]
      Tref = 298[K]
    RefractiveIndex
      n = 0.46
      ki = 3
  mat5: Common "InP - Indium Phosphide" on domains 2, 3
    def "Basic"
      relpermittivity = 12.5
      thermalconductivity = 68[W/(m*K)]
      density = 4810[kg/m^3]
      heatcapacity = 310[J/(kg*K)]
    SemicondMaterial "Semiconductor material"
      Eg0 = 1.344[V]
      chi0 = 4.38[V]
      Nv = (T/1[K])^(3/2)*2.2e15[1/cm^3]
      Nc = (T/1[K])^(3/2)*1.1e14[1/cm^3]
      mun = 5400[cm^2/(V*s)]
      mup = 200[cm^2/(V*s)]
    JainRoulstonModel
      An_jr = 17.2e-9[V]
      Bn_jr = 2.62e-7[V]
      Cn_jr = 98.4e-12[V]
      Ap_jr = 10.3e-9[V]
      Bp_jr = 4.43e-7[V]
      Cp_jr = 3.38e-12[V]
      Nref_jr = 1[1/cm^3]
      alpha_jr = 0.5
    RefractiveIndex
      n = 3.0531
      ki = 0.001
  mat6: Common "active region" on domains 7
    def "Basic"
      relpermittivity = 12.5
      thermalconductivity = 68[W/(m*K)]
      density = 4810[kg/m^3]
      heatcapacity = 310[J/(kg*K)]
    SemicondMaterial "Semiconductor material"
      Eg0 = 1.344[V]
      chi0 = 4.38[V]
      Nv = (T/1[K])^(3/2)*2.2e15[1/cm^3]
      Nc = (T/1[K])^(3/2)*1.1e14[1/cm^3]
      mun = 5400[cm^2/(V*s)]
      mup = 200[cm^2/(V*s)]
    JainRoulstonModel
      An_jr = 17.2e-9[V]
      Bn_jr = 2.62e-7[V]
      Cn_jr = 98.4e-12[V]
      Ap_jr = 10.3e-9[V]
      Bp_jr = 4.43e-7[V]
      Cp_jr = 3.38e-12[V]
      Nref_jr = 1[1/cm^3]
      alpha_jr = 0.5
    RefractiveIndex
      n = 3.23
      ki = 0.0001
  mat7: Common "Si3N4 - Silicon nitride" on domains 5, 12, 13
    def "Basic"
      electricconductivity = 0[S/m]
      thermalexpansioncoefficient = 2.3e-6[1/K]
      heatcapacity = 700[J/(kg*K)]
      relpermittivity = 9.7
      density = 3100[kg/m^3]
      thermalconductivity = 20[W/(m*K)]
    Enu "Young's modulus and Poisson's ratio"
      youngsmodulus = 250e9[Pa]
      poissonsratio = 0.23
    RefractiveIndex
      n = 1.5
      ki = 0.001
  mat9: Common "Au - Gold" (disabled) on domains 12
    def "Basic"
      electricconductivity = 45.6e6[S/m]
      thermalexpansioncoefficient = 14.2e-6[1/K]
      heatcapacity = 129[J/(kg*K)]
      density = 19300[kg/m^3]
      thermalconductivity = 317[W/(m*K)]
    Enu "Young's modulus and Poisson's ratio"
      youngsmodulus = 70e9[Pa]
      poissonsratio = 0.44
    RefractiveIndex
      n = 11
      ki = 58
  mat10: Common "InP-5e18" (disabled) on domains 1
    RefractiveIndex
      n = 2.9641
      ki = 0.005
  mat12: Common "InGas1" on domains 8
    RefractiveIndex
      n = n_ingas1
      ki = 0
  mat13: Common "InP2" on domains 9
    RefractiveIndex
      n = n_inp2
      ki = 0
  mat14: Common "InP3" on domains 10, 11
    RefractiveIndex
      n = n_inp3
      ki = 0
  mat15: Common "ingas4" on no domains
    RefractiveIndex
      n = n_ingas4
      ki = 0
  mat16: Common "ingas_1" on domains 4
    RefractiveIndex
      n = n_ingas_1
      ki = 0
  mat17: Common "inp_2" on domains 3
    RefractiveIndex
      n = n_inp_2
      ki = 0
  mat18: Common "n_ingas_3" on domains 2
    RefractiveIndex
      n = n_ingas_3
      ki = 0
  mat19: Common "n_subs" on domains 1
    RefractiveIndex
      n = n_subs
      ki = 0
  mat20: Common "AlN" on no domains

Physics
  ewfd: ElectromagneticWavesFrequencyDomain on all domains
    dependent variable E = {Ex, Ey, Ez}
    EquationForm.modeFreq = 1[kHz]
    BackgroundField.w0 = 0
    BackgroundField.Ebg = {0, 0, 0}
    MeshControl.SizeControlParameter = UserDefined
    wee1: WaveEquationElectric (default)
    pec1: PerfectElectricConductor (default)
    init1: init "Initial Values 1" (default)
    pec2: PerfectElectricConductor on boundaries 1-3, 5, 7, 40-43
    sctr1: Scattering "Scattering Boundary Condition 1" on boundaries 1-3, 5, 7, 9, 11, 13, 40-45

Mesh
  mesh1 "Mesh 1" (physics-controlled)
    size: MeshSizeDefault | hauto = 9

Studies
  std1 "Study 1"
    param: Parametric "Parametric Sweep" | sweeptype = filled; pname = w_top; plistarr = 7.5; punit = um
    mode: ModeAnalysis | modeFreq = c_const/wvl; neigs = 3; shift = 3.5

Solver configurations
  sol1 "Solution 1" (study std1)
    v1: Variables "Dependent Variables 1"
    e1: Eigenvalue "Eigenvalue Solver 1" | transform = effective_mode_index; neigs = 3; shift = 3.5
      dDef: Direct | rhob = 400
  sol2 "Parametric Solutions 1" (study std1)

Datasets
  dset2: Solution | solution = sol2
  cln1: CutLine2D | data = dset2; genpoints = {{w_sim/2, -h_sim}, {w_sim/2, h_sim}}

Derived values
  gev1: EvalGlobal "Global Evaluation 1"
    data = dset2
    table = tbl7
    expr = ewfd.neff
    unit = 1
    descr = Effective mode index

Plots
  pg5: PlotGroup2D "Electric Field (ewfd)" | data = dset2
    surf1: Surface | expr = ewfd.normE
  pg6: PlotGroup1D "1D Plot Group 6" | data = dset2
    lngr1: LineGraph | data = cln1; expr = ewfd.normE

Exports
  plot1: Plot | filename = 7.5um_TM_profile