// COMSOL Multiphysics 5.5.0.292 model "QCL.mph"
// Outline of the model tree

Parameters
  t_subs = 100[um]
  t_ridge = 7[um]
  w_ridge = 16[um]
  w_calc = 500[um]
  t_gold = 10[um]
  t_diamond = 20[um]
  t_copper = 200[um]
  current_density = 3[kA/cm^2]
  voltage = 12[V]
  Power_density = current_density*voltage/t_ridge

Geometry
  geom1 "Geometry 1" (2D, length unit m)
    r1: Rectangle "Substrate" | pos = {-w_calc/2, -t_subs}; size = {w_calc, t_subs}
    r2: Rectangle "Ridge" | pos = {-w_ridge/2, 0}; size = {w_ridge, t_ridge}
    r3: Rectangle "Gold" | pos = {-w_calc/2, 0}; size = {w_calc, t_gold}
    r4: Rectangle "Diamond" | pos = {-w_calc/2, t_gold}; size = {w_calc, t_diamond}
    r5: Rectangle | pos = {-0.5*w_calc, t_gold+t_diamond}; size = {w_calc, t_copper}
    fin: Finalize "Form Union"

Materials
  mat2: Common "InP [solid]" on all domains
    def "Basic"
      dL = (dL(T[1/K])-dL(Tempref[1/K]))/(1+dL(Tempref[1/K]))
      CTE = CTE(T[1/K])[1/K]
      thermalconductivity = k(T[1/K])[W/(m*K)]
      thermalexpansioncoefficient = (alpha(T[1/K])[1/K]+(Tempref-293[K])*if(abs(T-Tempref)>1e-3,(alpha(T[1/K])[1/K]-alpha(Tempref[1/K])[1/K])/(T-Tempref),d(alpha(T[1/K]),T)[1/K]))/(1+alpha(Tempref[1/K])[1/K]*(Tempref-293[K]))
      heatcapacity = C(T[1/K])[J/(kg*K)]
      HC = HC(T[1/K])[J/(mol*K)]
      density = rho(T[1/K])[kg/m^3]
      dL: Piecewise
        arg = T
        pieces = 
          {0.0, 25.0, -5.089746E-4-9.638829E-8*T^1-1.283758E-8*T^2-4.173837E-10*T^3}
          {25.0, 125.0, -4.785216E-4-2.596471E-6*T^1+3.018398E-8*T^2-9.08765E-11*T^3}
          {125.0, 400.0, -2.867253E-4-4.772633E-6*T^1+2.716989E-8*T^2-2.573775E-11*T^3}
          {400.0, 1300.0, -0.001924696+7.606483E-6*T^1-4.908583E-9*T^2+2.68192E-12*T^3}
      CTE: Piecewise
        arg = T
        pieces = 
          {0.0, 38.0, -4.378983E-9-5.316191E-11*T^1+1.385876E-10*T^2-7.52274E-11*T^3+1.340296E-12*T^4}
          {38.0, 125.0, 4.081257E-6-2.57968E-7*T^1+3.97524E-9*T^2-2.286793E-11*T^3+4.85914E-14*T^4}
          {125.0, 300.0, -3.038853E-6+6.555072E-9*T^1+4.226446E-10*T^2-1.999883E-12*T^3+2.709147E-15*T^4}
          {300.0, 1300.0, 4.104058E-6+4.591712E-9*T^1-8.070807E-12*T^2+5.780606E-15*T^3}
      k: Piecewise | arg = T; pieces = {293.0, 800.0, 379.7499-2.039335*T^1+0.004608192*T^2-4.787912E-6*T^3+1.881958E-9*T^4}
      alpha: Piecewise
        arg = T
        pieces = 
          {0.0, 125.0, 1.773684E-6+7.641675E-9*T^1+3.829792E-11*T^2-1.512764E-13*T^3}
          {125.0, 450.0, 6.518774E-7+2.491453E-8*T^1-5.117903E-11*T^2+3.515229E-14*T^3}
          {450.0, 1300.0, 4.035438E-6+3.150981E-9*T^1-4.866989E-12*T^2+2.571464E-15*T^3}
      C: Piecewise
        arg = T
        pieces = 
          {20.0, 300.0, -28.60968+3.00954*T^1-0.011154*T^2+2.267182E-5*T^3-2.136552E-8*T^4}
          {300.0, 910.0, 279.426+0.09999998*T^1}
      HC: Piecewise
        arg = T
        pieces = 
          {20.0, 300.0, -4.171114+0.4387723*T^1-0.001626184*T^2+3.305411E-6*T^3-3.11496E-9*T^4}
          {300.0, 910.0, 40.73858+0.01457938*T^1}
      rho: Piecewise
        arg = T
        pieces = 
          {0.0, 300.0, 4797.228+0.0175385*T^1-1.338365E-4*T^2-3.082923E-8*T^3}
          {300.0, 1300.0, 4815.542-0.1012332*T^1+6.058979E-5*T^2-3.429584E-8*T^3}
  mat3: Common "Copper" on domains 3, 4
    def "Basic"
      relpermeability = 1
      electricconductivity = 5.998e7[S/m]
      thermalexpansioncoefficient = 17e-6[1/K]
      heatcapacity = 385[J/(kg*K)]
      relpermittivity = 1
      density = 8700[kg/m^3]
      thermalconductivity = 400[W/(m*K)]
    Enu "Young's modulus and Poisson's ratio"
      youngsmodulus = 110e9[Pa]
      poissonsratio = 0.35
    linzRes "Linearized resistivity"
      rho0 = 1.72e-8[ohm*m]
      alpha = 0.0039[1/K]
      Tref = 298[K]
  mat4: Common "Gold [solid]" on domains 2, 3
    def "Basic"
      dL = (dL(T[1/K])-dL(Tempref[1/K]))/(1+dL(Tempref[1/K]))
      CTE = CTE(T[1/K])[1/K]
      thermalconductivity = k_solid_1(T[1/K])[W/(m*K)]
      resistivity = res_solid_1(T[1/K])[ohm*m]
      thermalexpansioncoefficient = (alpha(T[1/K])[1/K]+(Tempref-293[K])*if(abs(T-Tempref)>1e-3,(alpha(T[1/K])[1/K]-alpha(Tempref[1/K])[1/K])/(T-Tempref),d(alpha(T[1/K]),T)[1/K]))/(1+alpha(Tempref[1/K])[1/K]*(Tempref-293[K]))
      heatcapacity = C_solid_1(T[1/K])[J/(kg*K)]
      HC = HC_solid_1(T[1/K])[J/(mol*K)]
      mu = mu(T[1/K])[Pa]
      electricconductivity = sigma_solid_1(T[1/K])[S/m]
      density = rho(T[1/K])[kg/m^3]
      VP = VP_solid_1(T[1/K])[Pa]
      kappa = kappa(T[1/K])[Pa]
      dL: Piecewise | arg = T; pieces = {86.0, 1003.0, -0.003767805+1.179943E-5*T^1+3.792275E-9*T^2-5.959619E-13*T^3}
      CTE: Piecewise
        arg = T
        pieces = 
          {86.0, 200.0, 4.040319E-6+1.106436E-7*T^1-4.389255E-10*T^2+5.990814E-13*T^3}
          {200.0, 1003.0, 1.237291E-5+5.169284E-9*T^1-5.528527E-14*T^2}
      k_solid_1: Piecewise
        arg = T
        pieces = 
          {0.0, 14.0, 496.8118*T^1+41.00857*T^2-10.46095*T^3+0.5579006*T^4-0.009429161*T^5}
          {14.0, 45.0, 7977.526-554.7566*T^1+14.56751*T^2-0.1468484*T^3+3.231278E-4*T^4}
          {45.0, 85.0, 3568.586-199.4435*T^1+5.171042*T^2-0.06880706*T^3+4.612091E-4*T^4-1.23215E-6*T^5}
          {85.0, 1338.0, 330.6431-0.02536626*T^1-8.191375E-5*T^2+6.792908E-8*T^3-2.15362E-11*T^4}
      res_solid_1: Piecewise "Piecewise 1a"
        arg = T
        pieces = 
          {1.0, 25.0, 2.194815E-10+1.027514E-12*T^1-3.409278E-13*T^2+3.010164E-14*T^3}
          {25.0, 60.0, 1.390641E-9-1.228888E-10*T^1+4.182944E-12*T^2-2.773737E-14*T^3}
          {60.0, 400.0, -2.210068E-9+9.057611E-11*T^1-4.632985E-14*T^2+6.950205E-17*T^3}
          {400.0, 1338.0, -1.145028E-9+7.877041E-11*T^1-4.720065E-16*T^2+1.275961E-17*T^3}
      alpha: Piecewise
        arg = T
        pieces = 
          {86.0, 212.0, 1.221837E-5+1.15298E-8*T^1-1.573678E-11*T^2}
          {212.0, 1003.0, 1.436173E-5-4.015912E-9*T^1+1.10929E-11*T^2-5.625535E-15*T^3}
      C_solid_1: Piecewise "Piecewise 1b" | arg = T; pieces = {293.0, 1338.0, 399352.2*T^-2+114.8987+0.03228805*T^1}
      HC_solid_1: Piecewise "Piecewise 1c" | arg = T; pieces = {293.0, 1338.0, 78659.2*T^-2+22.63126+0.00635968*T^1}
      mu: Piecewise | arg = T; pieces = {293.0, 1280.0, 2.682905E10+142041.4*T^1-7037.486*T^2}
      sigma_solid_1: Piecewise "Piecewise 1d"
        arg = T
        pieces = 
          {1.0, 25.0, 1/(3.010164E-14*T^3-3.409278E-13*T^2+1.027514E-12*T+2.194815E-10)}
          {25.0, 60.0, 1/(-2.773737E-14*T^3+4.182944E-12*T^2-1.228888E-10*T+1.390641E-09)}
          {60.0, 400.0, 1/(6.950205E-17*T^3-4.632985E-14*T^2+9.057611E-11*T-2.210068E-09)}
          {400.0, 1338.0, 1/(1.275961E-17*T^3-4.720065E-16*T^2+7.877041E-11*T-1.145028E-09)}
      rho: Piecewise | arg = T; pieces = {86.0, 1003.0, 19501.44-0.6933844*T^1-2.041944E-4*T^2+4.297982E-8*T^3}
      VP_solid_1: Piecewise "Piecewise 1e" | arg = T; pieces = {293.0, 1337.0, (exp((-1.934300e+004/T-7.479000e-001*log10(T)+1.203281e+001)*log(10.0)))*1.333200e+002}
      kappa: Piecewise | arg = T; pieces = {293.0, 1280.0, 2.224306E11-913189.7*T^1-37420.01*T^2}
    Enu "Young's modulus and Poisson's ratio"
      youngsmodulus = E(T[1/K])[Pa]
      poissonsratio = nu(T[1/K])
      E: Piecewise
        arg = T
        pieces = 
          {0.0, 93.0, 8.190431E10-2.049635E7*T^1-8937.063*T^2}
          {93.0, 293.0, 8.249999E10-3.153455E7*T^1+48127.92*T^2-72.49967*T^3+0.02725845*T^4}
          {293.0, 1280.0, 7.736733E10+425187.2*T^1-20070.07*T^2}
      nu: Piecewise | arg = T; pieces = {293.0, 1280.0, 0.4403494+8.884688E-6*T^1-1.158876E-8*T^2+1.023495E-11*T^3}
  mat5: Common "Diamond" on no domains
    def "Basic"
      thermalconductivity = 22[W/(cm*K)]
      density = 3.514[g/cm^3]
      heatcapacity = 0.63[kJ/(kg*K)]
  mat6: Common "Air [gas]" on domains 3, 4
    def "Basic"
      thermalconductivity = k(T[1/K])[W/(m*K)]
      heatcapacity = C(T[1/K])[J/(kg*K)]
      density = rho(T[1/K])[kg/m^3]
      TD = TD(T[1/K])[m^2/s]
      dynamicviscosity = eta(T[1/K])[Pa*s]
      k: Piecewise | arg = T; pieces = {70.0, 1000.0, -8.404165E-4+1.107418E-4*T^1-8.635537E-8*T^2+6.31411E-11*T^3-1.88168E-14*T^4}
      C: Piecewise
        arg = T
        pieces = 
          {100.0, 375.0, 1010.97+0.0439479*T^1-2.922398E-4*T^2+6.503467E-7*T^3}
          {375.0, 1300.0, 1093.29-0.6355521*T^1+0.001633992*T^2-1.412935E-6*T^3+5.59492E-10*T^4-8.663072E-14*T^5}
          {1300.0, 3000.0, 701.0807+0.8493867*T^1-5.846487E-4*T^2+2.302436E-7*T^3-4.846758E-11*T^4+4.23502E-15*T^5}
      rho: Piecewise | arg = T; pieces = {80.0, 3000.0, 352.716*T^-1}
      TD: Piecewise
        arg = T
        pieces = 
          {300.0, 753.0, 1.713214E-4-1.204913E-6*T^1+2.839046E-9*T^2-1.532799E-12*T^3}
          {753.0, 873.0, 0.00416418-1.191227E-5*T^1+8.863636E-9*T^2}
      eta: Piecewise
        arg = T
        pieces = 
          {120.0, 600.0, -1.132275E-7+7.94333E-8*T^1-7.197989E-11*T^2+5.158693E-14*T^3-1.592472E-17*T^4}
          {600.0, 2150.0, 3.892629E-6+5.75387E-8*T^1-2.675811E-11*T^2+9.709691E-15*T^3-1.355541E-18*T^4}

Physics
  ht: HeatTransfer "Heat Transfer in Solids" on all domains
    dependent variable T
    PhysicalModelProperty.outOfPlaneProperty = 0
    PhysicalModelProperty.BackCompStateT = 0
    ConsistentStabilization.glim = (0.01[K])/ht.helem
    RadiationSettings.opaque = ht.dfltopaque
    solid1: SolidHeatTransferModel "Heat Transfer in Solids 1" (default)
    ins1: ThermalInsulation (default)
    init1: init "Initial Values 1" (default) | Tinit = 300
    hs1: HeatSource on domains 5 | P0 = 0*ht.d/1[m]; Q0 = 2E14
    temp1: TemperatureBoundary "Temperature 1" on boundaries 2, 9

Mesh
  mesh1 "Mesh 1" (physics-controlled)
    size: MeshSizeDefault | hauto = 4

Studies
  std1 "Study 1"
    param: Parametric "Parametric Sweep" | pname = t_subs; plistarr = range(10,10,200)[um]; punit = m
    time: Transient "Time Dependent" (disabled) | tunit = µs; tlist = range(0,0.1,4)
    stat: Stationary

Solver configurations
  sol1 "Solver 1" (study std1)
    v1: Variables "Dependent Variables 1"
    s1: Stationary "Stationary Solver 1" | stol = 0.0010
      fc1: FullyCoupled | initstep = 0.01; minstep = 1.0E-6; maxiter = 50
      d1: Direct | linsolver = pardiso; pardreorder = ndmt; rhob = 400