// COMSOL Multiphysics 5.5.0.292 model "lieb3_basic (copy).mph"
// 3D Silicon disk Air modified H8 3
// Outline of the model tree

Parameters
  wl = 1.5[um]
  height = 500[nm]
  d = 200[nm]  // pillar diameter
  a = 800[nm]  // period
  f0 = c_const/wl
  nSilica = 1.45^1
  nSi = 3.5
  a1 = a/2  // 225 [nm] 300 [nm]
  alpha = 0[deg]  // Angle of incidence
  beta = asin(1*sin(alpha)/nSilica)
  wlM = 1300[nm]
  kX = pi/a  // range(-pi/a,(pi/a-(-pi/a))/30,pi/a)
  kY = pi/a  // always check -pi/a, 0, pi/a
  freqM = pi/a*c_const*sqrt(2)
  f1 = c_const*sqrt(2)*(pi/a)/2/pi
  f2 = c_const*sqrt(2)*(1/a)/nSilica/2
  r4 = 50[nm]  // 4th pillar diameter
  r1 = 100[nm]  // central pillar diameter
  enable4th = 0

Functions
  int1: Interpolation "epsSi"
    funcname = epsSi
    table = 
      {191.89045, -5.1564771}
      {193.47455, -5.2259549}
      {195.05873, -5.2940371}
      {196.64297, -5.3606208}
      {198.22731, -5.4256025}
      {199.81171, -5.4888721}
      {201.39619, -5.5503185}
      {202.98076, -5.6098260}
      {204.56539, -5.6672746}
      {206.15010, -5.7225419}
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  an1: Analytic "nSi_f" | funcname = nSi_f; expr = sqrt(epsSi(c_const/freq*10^10)); args = freq

Variables
  var2 "Variables 2"
    kAir = ewfd.k0
    kSilica = nSilica*ewfd.k0
    kAirx = 0
    kAiry = kAir*sin(alpha)
    kAirz = kAir*cos(alpha)
    kSilicax = 0
    kSilicay = kSilica*sin(beta)
    kSilicaz = kSilica*cos(beta)

Selections
  ewfd_dst_pc1: Explicit on boundaries 8, 9
  ewfd_dst_pc2: Explicit on boundaries 28, 29
  ewfd_dst_pc3: Explicit on no boundaries
  ewfd_dst_pc4: Explicit on no boundaries

Coordinate systems
  pml1: PML "Perfectly Matched Layer 1" on domains 2 | PMLfactor = 1.0
  pml2: PML "Perfectly Matched Layer 2" on no domains | PMLfactor = 1.0

Geometry
  geom1 "Geometry 1" (3D, length unit nm)
    blk1: Block (disabled) | pos = {0, 0, -500*2}; base = center; size = {a, a, 1000*2}
    cyl1: Cylinder | pos = {a1/2, -a1/2, 0}; r = d/2; h = height
    mov1: Move (disabled) | input = cyl1; disply = -2*(a1+d/2); displz = 0
    cyl2: Cylinder | pos = {-a1/2, a1/2, 0}; r = d/2; h = height
    cyl3: Cylinder | pos = {-a1/2, -a1/2, 0}; r = r1/2; h = height
    blk2: Block | pos = {0, 0, 500}; base = center; size = {a, a, 1000}
    blk3: Block (disabled) | pos = {0, 0, -1500*2}; base = center; size = {a, a, 1000*2}
    blk4: Block | pos = {0, 0, 1500}; base = center; size = {a, a, 1000}
    cyl4: Cylinder (disabled) | pos = {a1/2, a1/2, 0}; r = r4/2; h = height
    if1: If | condition = enable4th
    cyl5: Cylinder | pos = {a1/2, a1/2, 0}; r = r4/2; h = height
    endif1: EndIf
    fin: Finalize "Form Union"

Materials
  mat1: Common "Silica" on no domains
    RefractiveIndex
      n = nSilica
      ki = 0
  mat3: Common "Air" on domains 1, 2
    RefractiveIndex
      n = 1
      ki = 0
  mat2: Common "Silicon" on domains 3-5
    RefractiveIndex
      n = 3.5
      ki = 0
  mat4: Common "Silicon 1" (disabled) on domains 3-5
    RefractiveIndex
      n = nSi_f(freq)
      ki = 0

Physics
  ewfd: ElectromagneticWavesFrequencyDomain on all domains
    dependent variable E = {Ex, Ey, Ez}
    EquationForm.modeFreq = 1[GHz]
    BackgroundField.w0 = (2*pi)/ewfd.k0
    MeshControl.PhysicsControlledMeshMaximumElementSize = wl/6
    MeshControl.SizeControlParameter = UserDefined
    wee1: WaveEquationElectric (default)
    pec1: PerfectElectricConductor (default)
    init1: init "Initial Values 1" (default)
    port1: Port (disabled) on no boundaries
      PortExcitation = off
      PortSlit = 1
      SlitType = DomainBacked
      PortOrientation = ReversePort
      beta = abs(kSilicaz)
      E0 = {exp(-i*kSilicay*y), 0, 0}
    port2: Port (disabled) on boundaries 6
      PortExcitation = on
      PortSlit = 1
      SlitType = DomainBacked
      PortOrientation = ReversePort
      beta = abs(kAirz)
      E0 = {exp(-i*kAiry*y), 0, 0}
    pc1: PeriodicCondition on boundaries 2, 5, 8, 9
      PeriodicType = Floquet
      kFloquet = {kX, kAiry*0+kY, 0}
      destinationDomains: boundaries 8, 9
    pc2: PeriodicCondition on boundaries 1, 4, 28, 29
      PeriodicType = Floquet
      kFloquet = {kX, kY, 0}
      destinationDomains: boundaries 28, 29
    pc3: PeriodicCondition on no boundaries | PeriodicType = Floquet; kFloquet = {kX, kSilicay*0+kY, 0}
    pc4: PeriodicCondition on no boundaries | PeriodicType = Floquet; kFloquet = {kX, kY, 0}

Mesh
  mesh1 "Mesh 1"
    size: MeshSizeDefault | hauto = 4
    ftri1: FreeTri "Free Triangular 1" on boundaries 12, 16, 24
      size1: Size on no boundaries | hmax = wlM/5/3.5; custom = on
    cpf1: CopyFace | source = boundaries 12, 16, 24; destination = boundaries 13, 17, 25
    swe1: Sweep "Swept 1" (disabled) on domains 5 | facemethod = quadlegacy52
      dis1: Distribution on domains 5 | numelem = 6
    ftet2: FreeTet "Free Tetrahedral 2" on domains 3-5 | method = dellegacy52
      size1: Size on domains 5 | hmax = wlM/5/3.5; custom = on
    swe3: Sweep "Swept 3" (disabled) on domains 3, 4 | facemethod = quadlegacy52
      dis1: Distribution on domains 3, 4 | numelem = 6
    ftri4: FreeTri "Free Triangular 4" (disabled) on no boundaries
      size1: Size on no boundaries | hmax = wlM/5/3.5; custom = on
    cpf4: CopyFace (disabled)
    ftet5: FreeTet "Free Tetrahedral 5" (disabled) on no domains | method = dellegacy52
      size1: Size on no domains | hmax = wlM/5/3.5; custom = on
    swe4: Sweep "Swept 4" (disabled) on no domains | facemethod = quadlegacy52
      dis1: Distribution on no domains | numelem = 6
    ftri5: FreeTri "Free Triangular 5" on no boundaries
      size1: Size on no boundaries | hmax = 40; custom = on
    ftri6: FreeTri "Free Triangular 6" on boundaries 8, 9
      size1: Size on boundaries 8, 9 | hmax = wlM/5/1.45; custom = on
    cpf5: CopyFace | source = boundaries 8, 9; destination = boundaries 2, 5
    ftri7: FreeTri "Free Triangular 7" on boundaries 1, 4
      size1: Size on boundaries 1, 4 | hmax = wlM/5/1.45; custom = on
    cpf6: CopyFace | source = boundaries 1, 4; destination = boundaries 28, 29
    ftet1: FreeTet "Free Tetrahedral 1" on remaining entities | method = dellegacy52
      size1: Size on entire geometry | hmax = wlM/5/1.45; custom = on

Studies
  std1 "Study 1"
    param: Parametric "Parametric Sweep" | pname = wl; plistarr = range(1.5,0.01,1.65); punit = um
    freq: Frequency "Frequency Domain" | punit = Hz; plist = f0
  std2 "Study 2"
    param2: Parametric "Radius"
      sweeptype = filled
      pname = {d, r1}
      plistarr = {range(100,200/7,300), range(100,200/7,300)}
      punit = {nm, nm}
    param: Parametric "Parametric Sweep"
      pname = {kX, kY}
      plistarr = {range(pi/a,(0-(pi/a))/10,0), range(pi/a,(0-(pi/a))/10,0)}
      punit = {1/m, 1/m}
    eig: Eigenfrequency | neigs = 15; eigunit = Hz; shift = 2.14e14

Tables
  tbl7: Table
    // Global Evaluation 1 (real(freq), imag(freq))
    d (nm) | r1 (nm) | kX (1/m) | kY (1/m) | lambda (Hz) | real(freq) (1/s) | imag(freq) (1/s)
    50 | 300 | 3.92699e+06 | 3.92699e+06 | 8.00782e+08-9.31453e+14i | 1.48245e+14 | 1.27448e+08
    50 | 300 | 3.92699e+06 | 3.92699e+06 | 1.08171e+08-1.21815e+15i | 1.93874e+14 | 1.7216e+07
    50 | 300 | 3.92699e+06 | 3.92699e+06 | 1.14517e+08-1.21817e+15i | 1.93878e+14 | 1.82259e+07
    50 | 300 | 3.92699e+06 | 3.92699e+06 | -7.11318e+09-1.42414e+15i | 2.26659e+14 | -1.1321e+09
    50 | 300 | 3.92699e+06 | 3.92699e+06 | 4.33998e+09-1.42714e+15i | 2.27137e+14 | 6.90729e+08
    50 | 300 | 3.92699e+06 | 3.92699e+06 | 4.27826e+09-1.42718e+15i | 2.27142e+14 | 6.80907e+08
    50 | 300 | 3.92699e+06 | 3.92699e+06 | 4.66504e+10-1.59366e+15i | 2.53639e+14 | 7.42465e+09
    50 | 300 | 3.92699e+06 | 3.92699e+06 | 1.97678e+11-1.62264e+15i | 2.58252e+14 | 3.14614e+10
    50 | 300 | 3.92699e+06 | 3.92699e+06 | 1.98163e+11-1.62268e+15i | 2.58257e+14 | 3.15387e+10
    50 | 300 | 3.92699e+06 | 3.92699e+06 | 1.04511e+13-1.6732e+15i | 2.66298e+14 | 1.66335e+12
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
Plots
  pg12: PlotGroup1D "1D Plot Group 12"
    tblp1: Table "Table Graph 1" | table = tbl3; plotcolumninput = manual
  pg13: PlotGroup1D "1D Plot Group 13"
    tblp1: Table "Table Graph 1" | table = tbl7; plotcolumninput = manual