// COMSOL Multiphysics 5.5.0.292 model "square.mph"
// 3D Silicon disk Air modified H8 3
// Outline of the model tree

Parameters
  wl = 1.5[um]
  height = 500[nm]
  d = 150[nm]
  a = 600[nm]
  f0 = c_const/wl
  nSilica = 1.45^1
  nSi = 3.5
  a1 = 400[nm]  // 225 [nm] 300 [nm]
  alpha = 0[deg]  // Angle of incidence
  beta = asin(1*sin(alpha)/nSilica)
  wlM = 1300[nm]
  kX = pi/a  // range(-pi/a,(pi/a-(-pi/a))/30,pi/a)
  kY = pi/a  // always check -pi/a, 0, pi/a
  freqM = pi/a*c_const*sqrt(2)
  f1 = c_const*sqrt(2)*(pi/a)/2/pi
  f2 = c_const*sqrt(2)*(1/a)/nSilica/2
  r4 = 250[nm]
  r1 = 290[nm]  // central pillar diameter

Functions
  int1: Interpolation "epsSi"
    funcname = epsSi
    table = 
      {191.89045, -5.1564771}
      {193.47455, -5.2259549}
      {195.05873, -5.2940371}
      {196.64297, -5.3606208}
      {198.22731, -5.4256025}
      {199.81171, -5.4888721}
      {201.39619, -5.5503185}
      {202.98076, -5.6098260}
      {204.56539, -5.6672746}
      {206.15010, -5.7225419}
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  an1: Analytic "nSi_f" | funcname = nSi_f; expr = sqrt(epsSi(c_const/freq*10^10)); args = freq

Variables
  var2 "Variables 2"
    kAir = ewfd.k0
    kSilica = nSilica*ewfd.k0
    kAirx = 0
    kAiry = kAir*sin(alpha)
    kAirz = kAir*cos(alpha)
    kSilicax = 0
    kSilicay = kSilica*sin(beta)
    kSilicaz = kSilica*cos(beta)

Coordinate systems
  pml1: PML "Perfectly Matched Layer 1" on domains 2, 5 | PMLfactor = 1.0
  pml2: PML "Perfectly Matched Layer 2" (disabled) on no domains | PMLfactor = 1.0

Geometry
  geom1 "Geometry 1" (3D, length unit nm)
    blk1: Block (disabled) | pos = {0, 0, -500*2}; base = center; size = {a, a, 1000*2}
    cyl1: Cylinder | r = a1/2; h = 2000
    mov1: Move (disabled) | input = cyl1; disply = -2*(a1+d/2); displz = 0
    cyl2: Cylinder (disabled) | pos = {-a1/2, a1/2, 0}; r = d/2; h = height
    cyl3: Cylinder (disabled) | pos = {-a1/2, -a1/2, 0}; r = r1/2; h = height
    blk2: Block | pos = {0, 0, 250*2}; base = center; size = {a, a, 500*2}
    blk3: Block (disabled) | pos = {0, 0, -1500*2}; base = center; size = {a, a, 1000*2}
    blk4: Block | pos = {0, 0, 1500}; base = center; size = {a, a, 500*2}
    cyl4: Cylinder (disabled) | pos = {a1/2, a1/2, 0}; r = r4/2; h = height
    cyl5: Cylinder | r = a1/2; h = height
    fin: Finalize "Form Union"

Materials
  mat3: Common "Air" on domains 1, 2, 4, 5
    RefractiveIndex
      n = 1
      ki = 0
  mat1: Common "Silica" on no domains
    RefractiveIndex
      n = nSilica
      ki = 0
  mat2: Common "Silicon" on domains 3
    RefractiveIndex
      n = 3.5
      ki = 0
  mat4: Common "Silicon 1" (disabled) on domains 1, 3, 4
    RefractiveIndex
      n = nSi_f(freq)
      ki = 0

Physics
  ewfd: ElectromagneticWavesFrequencyDomain on all domains
    dependent variable E = {Ex, Ey, Ez}
    EquationForm.modeFreq = 1[GHz]
    BackgroundField.w0 = (2*pi)/ewfd.k0
    MeshControl.PhysicsControlledMeshMaximumElementSize = wl/6
    MeshControl.SizeControlParameter = FromStudy
    wee1: WaveEquationElectric (default)
    pec1: PerfectElectricConductor (default)
    init1: init "Initial Values 1" (default)
    port1: Port (disabled) on no boundaries
      PortExcitation = off
      PortSlit = 1
      SlitType = DomainBacked
      PortOrientation = ReversePort
      beta = abs(kSilicaz)
      E0 = {exp(-i*kSilicay*y), 0, 0}
    port2: Port (disabled) on no boundaries
      PortExcitation = on
      PortSlit = 1
      SlitType = DomainBacked
      PortOrientation = ReversePort
      beta = abs(kAirz)
      E0 = {exp(-i*kAiry*y), 0, 0}
    pc1: PeriodicCondition on boundaries 2, 8
      PeriodicType = Floquet
      kFloquet = {kX, kAiry*0+kY, 0}
      destinationDomains: boundaries 8
    pc2: PeriodicCondition on boundaries 1, 26
      PeriodicType = Floquet
      kFloquet = {kX, kY, 0}
      destinationDomains: boundaries 26
    pc3: PeriodicCondition on boundaries 4, 27
      PeriodicType = Floquet
      kFloquet = {kX, kSilicay*0+kY, 0}
      destinationDomains: boundaries 27
    pc4: PeriodicCondition on boundaries 5, 9
      PeriodicType = Floquet
      kFloquet = {kX, kY, 0}
      destinationDomains: boundaries 9

Mesh
  mesh1 "Mesh 1"
    size: MeshSizeDefault | hmax = 40; hmin = 20; custom = on
    ftri1: FreeTri "Free Triangular 1" on boundaries 8, 9, 26, 27
    cpf1: CopyFace | source = boundaries 8, 9, 26, 27; destination = boundaries 1, 2, 4, 5
    ftet1: FreeTet "Free Tetrahedral 1" on remaining entities

Studies
  std1 "Study 1"
    param: Parametric "Parametric Sweep" | pname = wl; plistarr = range(1.5,0.01,1.65); punit = um
    freq: Frequency "Frequency Domain" | punit = Hz; plist = f0
  std2 "Study 2"
    param2: Parametric "Radius" | pname = a1; plistarr = 300; punit = nm
    param: Parametric "Parametric Sweep" (disabled)
      pname = {kX, kY}
      plistarr = {range(pi/a,(0-(pi/a))/29,0), range(pi/a,(0-(pi/a))/29,0)}
      punit = {1/m, 1/m}
      accumtable = new
    eig: Eigenfrequency | neigs = 15; eigunit = Hz; shift = 2.14e14

Solver configurations
  sol1 "Solution 1" (study std1)
    v1: Variables "Dependent Variables 1"
    s1: Stationary "Stationary Solver 1" | stol = 0.01
      p1: Parametric | pname = freq; plistarr = f0; punit = Hz; pcontinuationmode = no
      fc1: FullyCoupled
      d1: Direct "Suggested Direct Solver (ewfd)"
  sol3 "Solution 3" (study std2)
    v1: Variables "Dependent Variables 1"
    e1: Eigenvalue "Eigenvalue Solver 1"
      d1: Direct "Suggested Direct Solver (ewfd)"
  sol4 "Parametric Solutions 2" (study std2)

Datasets
  dset1: Solution | solution = sol3
  dset2: Solution | solution = sol4

Plots
  pg1: PlotGroup1D "1D Plot Group 1" | data = none
    tblp1: Table "Table Graph 1" | table = tbl1; xaxisdata = auto; plotcolumninput = manual
  pg2: PlotGroup3D "3D Plot Group 2" | data = dset2
    slc1: Slice | expr = ewfd.normE