// COMSOL Multiphysics 5.5.0.292 model "squarehole.mph"
// 3D Silicon disk Air modified H8 3
// Outline of the model tree

Parameters
  wl = 1.5[um]
  height = 300[nm]
  d = 300[nm]  // pillar diameter
  a = 800[nm]  // period
  f0 = c_const/wl
  nSilica = 1.45^1
  nSi = 3.5
  a1 = a/2  // 225 [nm] 300 [nm]
  alpha = 0[deg]  // Angle of incidence
  beta = asin(1*sin(alpha)/nSilica)
  wlM = 1300[nm]
  kX = pi/a  // range(-pi/a,(pi/a-(-pi/a))/30,pi/a)
  kY = (kX<0)*kX  // always check -pi/a, 0, pi/a
  freqM = pi/a*c_const*sqrt(2)
  f1 = c_const*sqrt(2)*(pi/a)/2/pi
  f2 = c_const*sqrt(2)*(1/a)/nSilica/2
  r4 = 50[nm]  // 4th pillar diameter
  r1 = d  // central pillar diameter
  enable4th = 0
  nk = 20

Functions
  int1: Interpolation "epsSi"
    funcname = epsSi
    table = 
      {191.89045, -5.1564771}
      {193.47455, -5.2259549}
      {195.05873, -5.2940371}
      {196.64297, -5.3606208}
      {198.22731, -5.4256025}
      {199.81171, -5.4888721}
      {201.39619, -5.5503185}
      {202.98076, -5.6098260}
      {204.56539, -5.6672746}
      {206.15010, -5.7225419}
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  an1: Analytic "nSi_f" | funcname = nSi_f; expr = sqrt(epsSi(c_const/freq*10^10)); args = freq

Variables
  var2 "Variables 2"
    kAir = ewfd.k0
    kSilica = nSilica*ewfd.k0
    kAirx = 0
    kAiry = kAir*sin(alpha)
    kAirz = kAir*cos(alpha)
    kSilicax = 0
    kSilicay = kSilica*sin(beta)
    kSilicaz = kSilica*cos(beta)

Selections
  ewfd_dst_pc1: Explicit on boundaries 11-13
  ewfd_dst_pc2: Explicit on boundaries 20-22
  ewfd_dst_pc3: Explicit on no boundaries
  ewfd_dst_pc4: Explicit on no boundaries

Probes
  var3: GlobalVariable "ky" (disabled) | expr = kY; unit = 1/m; descr = always check -pi/a, 0, pi/a
  var1: GlobalVariable "realfreq" | expr = real(freq); unit = 1/s
  var2: GlobalVariable "imagfreq" | expr = imag(freq); unit = 1/s

Coordinate systems
  pml1: PML "Perfectly Matched Layer 1" on domains 3 | PMLfactor = 1.0
  pml2: PML "Perfectly Matched Layer 2" on no domains | PMLfactor = 1.0

Geometry
  geom1 "Geometry 1" (3D, length unit nm)
    blk1: Block (disabled) | pos = {0, 0, -500*2}; base = center; size = {a, a, 1000*2}
    cyl1: Cylinder | r = d/2; h = height
    blk2: Block | pos = {0, 0, 500}; base = center; size = {a, a, 1000}
    blk3: Block (disabled) | pos = {0, 0, -1500*2}; base = center; size = {a, a, 1000*2}
    blk4: Block | pos = {0, 0, 1500}; base = center; size = {a, a, 1000}
    blk5: Block | pos = {0, 0, height/2}; base = center; size = {a, a, height}
    fin: Finalize "Form Union"

Materials
  mat1: Common "Silica" on no domains
    RefractiveIndex
      n = nSilica
      ki = 0
  mat3: Common "Air" on domains 1-4
    RefractiveIndex
      n = 1
      ki = 0
  mat2: Common "Silicon" (disabled) on domains 4
    RefractiveIndex
      n = 3.5
      ki = 0
  mat4: Common "Silicon 1" (disabled) on domains 4
    RefractiveIndex
      n = nSi_f(freq)
      ki = 0
  mat6: Common "Si-Ge (Silicon-germanium, SiGe) (Jellison et al. 1993: 11% Si, Ge substrate; n,k 0.24-0.84 µm)" (disabled) on domains 4
    RefractiveIndex
      n = n_interp(c_const/freq)
      ki = k_interp(c_const/freq)
      int1: Interpolation "Refractive index"
        funcname = n_interp
        table = 
          {2.4E-7, 1.571}
          {2.42e-07, 1.564}
          {2.44e-07, 1.579}
          {2.46E-7, 1.601}
          {2.48E-7, 1.613}
          {2.5E-7, 1.652}
          {2.52E-7, 1.672}
          {2.54e-07, 1.705}
          {2.56E-7, 1.731}
          {2.58E-7, 1.766}
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        interp = cubicspline
        argunit = m
        fununit = 1
      int2: Interpolation "Refractive index, imaginary part"
        funcname = k_interp
        table = 
          {2.4E-7, 3.177}
          {2.42e-07, 3.216}
          {2.44e-07, 3.265}
          {2.46E-7, 3.313}
          {2.48E-7, 3.368}
          {2.5E-7, 3.427}
          {2.52E-7, 3.484}
          {2.54e-07, 3.546}
          {2.56E-7, 3.61}
          {2.58E-7, 3.679}
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        interp = cubicspline
        argunit = m
        fununit = 1
  mat7: Common "aSi Kuznetsov" on domains 1, 2
    RefractiveIndex
      n = n_interp(1[1/m]*c_const/freq)
      ki = k_interp(1[1/m]*c_const/freq)
      n_interp: Interpolation
        table = 
          {6E-7, 3.9312}
          {6.05E-7, 3.9143}
          {6.1E-7, 3.898}
          {6.15E-7, 3.8823}
          {6.2E-7, 3.8671}
          {6.25E-7, 3.8525}
          {6.3E-7, 3.8384}
          {6.35E-7, 3.8247}
          {6.4E-7, 3.8116}
          {6.45E-7, 3.7988}
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        interp = piecewisecubic
      k_interp: Interpolation
        table = 
          {6E-7, 0.05638}
          {6.05E-7, 0.05225}
          {6.1E-7, 0.04845}
          {6.15E-7, 0.04494}
          {6.2E-7, 0.04171}
          {6.25E-7, 0.03873}
          {6.3E-7, 0.03598}
          {6.35E-7, 0.03345}
          {6.4E-7, 0.0311}
          {6.45E-7, 0.02894}
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        interp = piecewisecubic

Physics
  ewfd: ElectromagneticWavesFrequencyDomain on all domains
    dependent variable E = {Ex, Ey, Ez}
    EquationForm.modeFreq = 1[GHz]
    BackgroundField.w0 = (2*pi)/ewfd.k0
    MeshControl.PhysicsControlledMeshMaximumElementSize = wl/6
    MeshControl.SizeControlParameter = UserDefined
    wee1: WaveEquationElectric (default)
    pec1: PerfectElectricConductor (default)
    init1: init "Initial Values 1" (default) | E = {1e-9, 1e-9, 1e-9}
    port1: Port (disabled) on no boundaries
      PortExcitation = off
      PortSlit = 1
      SlitType = DomainBacked
      PortOrientation = ReversePort
      beta = abs(kSilicaz)
      E0 = {exp(-i*kSilicay*y), 0, 0}
    port2: Port (disabled) on boundaries 9
      PortExcitation = on
      PortSlit = 1
      SlitType = DomainBacked
      PortOrientation = ReversePort
      beta = abs(kAirz)
      E0 = {exp(-i*kAiry*y), 0, 0}
    pc1: PeriodicCondition on boundaries 2, 5, 8, 11-13
      PeriodicType = Floquet
      kFloquet = {kX, kAiry*0+kY, 0}
      destinationDomains: boundaries 11-13
    pc2: PeriodicCondition on boundaries 1, 4, 7, 20-22
      PeriodicType = Floquet
      kFloquet = {kX, kY, 0}
      destinationDomains: boundaries 20-22
    pc3: PeriodicCondition (disabled) on no boundaries | PeriodicType = Floquet; kFloquet = {kX, kSilicay*0+kY, 0}
    pc4: PeriodicCondition (disabled) on no boundaries | PeriodicType = Floquet; kFloquet = {kX, kY, 0}
    sctr1: Scattering "Scattering Boundary Condition 1" on boundaries 10

Mesh
  mesh1 "Mesh 1"
    size: MeshSizeDefault | hmax = 200; hmin = 36; hcurve = 0.6; hnarrow = 0.5; hgrad = 1.5

Studies
  std1 "Study 1"
    param: Parametric "Parametric Sweep" | pname = wl; plistarr = range(1.5,0.01,1.65); punit = um
    freq: Frequency "Frequency Domain" | punit = Hz; plist = f0
  std2 "Study 2"
    param2: Parametric "Radius" | sweeptype = filled; pname = d; plistarr = 100,200,300,400; punit = nm
    param: Parametric "Parametric Sweep"
      sweeptype = filled
      pname = kX
      plistarr = range(-pi/a,(pi/a-(-pi/a))/(nk*2-1),pi/a)
      punit = 1/m
      useaccumtable = on
      keepsol = last
    eig: Eigenfrequency | neigs = 8; shift = 173.13

Plots
  pg1: PlotGroup1D "Probe Plot Group 1"
  pg2: PlotGroup2D "2D Plot Group 2"